*Heading
** Job name: comp_23 Model name: Model-1
** Generated by: Abaqus/CAE 2021
*Preprint, echo=NO, model=NO, history=NO, contact=NO
**
** PARTS
**
*Part, name=rhino_603
*Node
      1,  -1.54151666,  0.674636066,  0.962767303
      2,   -1.5184226,  0.674636066,  0.962767303
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*Element, type=C3D4
    1,  8129,  8130,  8131,  8132
    2,  8133,  8134,  8135,  8136
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*Nset, nset=_PickedSet6, internal, generate
     1,  15237,      1
*Elset, elset=_PickedSet6, internal, generate
     1,  63154,      1
*Nset, nset=Set-5, generate
     1,  15237,      1
*Elset, elset=Set-5, generate
     1,  63154,      1
** Section: ti
*Solid Section, elset=Set-5, material=Ti
,
*End Part
**
**
** ASSEMBLY
**
*Assembly, name=Assembly
**
*Instance, name=rhino_603-1, part=rhino_603
*End Instance
**
*Node
      1,          10.,          10.,         12.5
*Node
      2,          10.,          10.,         12.5
*Nset, nset=bot, instance=rhino_603-1
  155,  156,  157,  158,  174,  175
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*Elset, elset=bot, instance=rhino_603-1
   675,  1643,  1769,  4686,  6713,  6732
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*Nset, nset=rp
 1,
*Nset, nset=top, instance=rhino_603-1
  301,  302,  303,  304,  316,  317
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*Elset, elset=top, instance=rhino_603-1
  1312,  1720,  2062,  2788,  3481,  3507
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** Constraint: Constraint-1
*Equation
2
top, 2, 1.
rp, 2, -1.
*End Assembly
**
** MATERIALS
**
*Material, name=Ti
*Elastic
 1.1e+08, 0.33
**
** BOUNDARY CONDITIONS
**
** Name: BC-1 Type: Displacement/Rotation
*Boundary
top, 1, 1
top, 3, 3
** Name: bot Type: Displacement/Rotation
*Boundary
bot, 2, 2
** ----------------------------------------------------------------
**
** STEP: Step-1
**
*Step, name=Step-1, nlgeom=NO
*Static
1., 1., 1e-05, 1.
**
** BOUNDARY CONDITIONS
**
** Name: BC-3 Type: Displacement/Rotation
*Boundary
rp, 2, 2, -1.5
**
** OUTPUT REQUESTS
**
*Restart, write, frequency=0
**
** FIELD OUTPUT: F-Output-1
**
*Output, field, variable=PRESELECT
**
** HISTORY OUTPUT: H-Output-1
**
*Output, history, variable=PRESELECT
*End Step
